# Visualize 5-mer peptide with solvation shell using PIMD

# output dump image every this many steps
variable vizsteps index 100
# run for this many steps
variable runsteps index 10000

units           real
atom_style      full

pair_style      lj/charmm/coul/long 8.0 10.0 10.0
bond_style      harmonic
angle_style     charmm
dihedral_style  charmm
improper_style  harmonic
kspace_style    pppm 0.0001

read_data       data.peptide

neighbor        2.0 bin
neigh_modify    delay 2 every 1

timestep        0.05

thermo_style    multi
thermo          1000

fix             1 all pimd/langevin method nmpimd ensemble npt integrator obabo thermostat PILE_L 1234 tau 1000.0 temp 275.0 iso 1.0 barostat BZP taup 1000.0 fixcom no

# fix PIMD is incompatible with fix SHAKE
#fix             2 all shake 0.0001 10 1000 b 4 6 8 10 12 14 18 a 31

group           peptide type <= 12

# recenter system so the peptide is in the center of the box for that we compute the center
# of mass of the peptide and the center of the box and displace atoms so that they will match
variable comx equal xcm(peptide,x)
variable comy equal xcm(peptide,y)
variable comz equal xcm(peptide,z)
variable midx equal 0.5*(xhi+xlo)
variable midy equal 0.5*(yhi+ylo)
variable midz equal 0.5*(zhi+zlo)
displace_atoms all move $(-v_comx+v_midx)  $(-v_comy+v_midy) $(-v_comz+v_midz)
variable comx delete
variable comy delete
variable comz delete
variable midx delete
variable midy delete
variable midz delete

# select atoms for visualization: peptide and water molecules within 2.5 angstrom
group           viz dynamic peptide within 2.5 include molecule every ${vizsteps}

# display atoms from other replica
fix             rep viz graphics/replica ${vizsteps} display 0.4

# create visualization only on partition 1
# we must color bonds by type instead of by atom color so that hiding
# atoms by making them transparent does not also hide part of the bond
partition yes 1 dump viz viz image ${vizsteps} pimd-*.ppm element element &
                       size 800 800 zoom 2.0 view 80 0 bond type 0.25 fix rep element 0 0 &
                       fsaa yes ssao yes 12384 0.4 shiny 0.1 box no 0.1 center s 0.65 0.45 0.5 &

# set hydrogen atoms to be transparent, so we can see their fix graphics/replica representations
# the replica of the heavy atoms will all be inside their regular spheres to limit distractions
partition yes 1 dump_modify viz pad 5 boxcolor white backcolor darkgray backcolor2 silver &
                 element C C O H N C C C O H H S O H bcolor * darkslategray &
                 atrans 4 0.0 atrans 10 0.0 atrans 11 0.0 atrans 14 0.0

run             ${runsteps}
