# Rhodopsin model

units           real
neigh_modify    delay 5 every 1
atom_style      full
bond_style      harmonic
angle_style     charmm
dihedral_style  charmm
improper_style  harmonic
pair_style      lj/charmm/coul/long 8.0 10.0
pair_modify     mix arithmetic
kspace_style    pppm 1e-4

read_data       data.rhodo

fix             1 all ilves 0.0001 100 50 m 1.0 a 232 variant full
fix             2 all npt temp 300.0 300.0 100.0 &
                z 0.0 0.0 1000.0 mtk no pchain 0 tchain 1

special_bonds   charmm

if "$(extract_setting(world_size)) > 1" then "comm_modify cutoff 20"

thermo          50
thermo_style    multi
timestep        2.0

run             200
