# Initialization
units           metal
boundary        p p p
atom_style      full
processors      * * 1     # domain decomposition over x and y
read_data       ./gra_water.data
mass            1 12.0107   # carbon   	mass (g/mole)
mass            2 15.9994   # oxygen    mass (g/mole)
mass            3 1.008     # hydrogen 	mass (g/mole)
# Separate atom groups
group 		gr    molecule 1
group 		water molecule 2
######################## Potential defition ##############################
# Interlayer potential
pair_style  hybrid/overlay  ilp/water/2dm/opt 16.0 lj/cut/tip4p/long 2 3 1 1 0.1546 10 8.5
####################################################################
pair_coeff  1 1   none
pair_coeff  2 2   lj/cut/tip4p/long    8.0313e-3  3.1589  # O-O
pair_coeff  2 3   lj/cut/tip4p/long    0.0 0.0  		  # O-H
pair_coeff  3 3   lj/cut/tip4p/long    0.0 0.0  	      # H-H
pair_coeff  * *   ilp/water/2dm/opt        COH.ILP C Ow Hw    # C-water
# bond and angle
bond_style  	  harmonic
bond_coeff  	  1 	0.0  0.9572
angle_style 	  harmonic
angle_coeff 	  1 	0.0  104.52
# define kspace calculation
kspace_style      pppm/tip4p 1E-5
# Neighbor update settings
neighbor        2.0 bin
neigh_modify every 1 delay 5 check yes page 1000000 one 100000
####################################################################
# Calculate pair energy
compute   	1 all pair lj/cut/tip4p/long
compute   	2 all pair ilp/water/2dm/opt
compute		wt water temp
variable  	TIP4P  equal  c_1
variable  	EILP   equal  c_2     # total interlayer energy
variable	temp_wt equal c_wt
############# Output ##############
thermo_style    custom step etotal pe ke v_TIP4P v_EILP  v_temp_wt
thermo          100
thermo_modify   lost error

fix				subf gr setforce 0.0 0.0 0.0
fix 			1 	water shake 0.0001 20 100 b 1 a 1

timestep  		1e-3
velocity  	  	water create 300.0 12345 dist gaussian mom yes rot yes
fix				2 water nve
run			    1000
