processors         * 1 1 # manually assign processors to spatial regions
atom_style         sph
dimension          2
newton             on
boundary           f f p
units              lj
read_data          data.initial

variable           h equal 0.03
variable           c equal 10.0 # soundspeed for Tait's EOS
variable           dt equal 0.1*${h}/${c} # upper limit of timestep based on CFL-like criterion
variable           nrun equal 15.0/${dt} # roughly estimate number of timesteps needed for 7.5 seconds

group              bc    type 2 # assign group name "bc" to boundary particles (type 2)
group              water type 1 # assign group name "water" to water particles (type 1)

# use hybrid pairstyle which does density summation with cutoff ${h} every timestep (1)
pair_style         hybrid/overlay sph/rhosum 1 sph/taitwater
pair_coeff         * * sph/taitwater 1000.0 ${c} 1.0 ${h} # use target density of 1000, soundspeed ${c} for Tait's EOS
pair_coeff         1 1 sph/rhosum ${h}

fix                gfix water gravity -9.81 vector 0 1 0 # add gravity. This fix also computes potential energy of mass in gravity field.
fix                2d_fix all enforce2d

compute            rho_peratom all sph/rho/atom
compute            e_peratom all sph/e/atom
compute            esph all reduce sum c_e_peratom
compute            ke all ke
variable           etot equal c_esph+c_ke+f_gfix

#                                     adjust nevery | min. allowed dt | max. allowed dt | max. travel distance per dt # // ${dt} ~= CFL criterion 0.1*h/c
fix                dtfix all dt/reset 1               NULL              ${dt}             0.0005 units box # use a variable timestep

# time-integrate position, velocities, internal energy and density of water particles
fix                integrate_water_fix water sph

# time-integrate only internal energy and density of boundary particles
fix                integrate_bc_fix bc sph/stationary
# dump               dump_id all custom 100 dump.lammpstrj id type xs ys zs c_rho_peratom c_e_peratom fx fy
#dump_modify        dump_id first yes
thermo             100
thermo_style       custom step ke c_esph v_etot f_gfix press time f_dtfix
thermo_modify      norm no

neigh_modify       every 5 delay 0 check no
variable           skin equal 0.3*${h}
neighbor           ${skin} bin # set Verlet list skin distance

#dump               viz all image 100 water_collapse-*.ppm c_e_peratom type &
#                   size 800 600 zoom 5.0 shiny 0.6  fsaa yes box yes 0.02 center s 0.5 0.15 0
#dump_modify        viz pad 6 boxcolor gray backcolor silver adiam * 0.0625 &
#                   color map1 0.001 0.000 0.014 color map2 0.342 0.062 0.429 &
#                   color map3 0.736 0.216 0.330 color map4 0.978 0.558 0.035 &
#                   color map5 0.988 0.998 0.645 &
#                   amap 0.0 5.0 cf 0.0 5 min map1 0.25 map2 0.5 map3 0.75 map4 max map5

run                ${nrun}
