# minimize water model with LATTE and FIRE

units           metal
atom_style      full

read_data       data.water

# replicate system if requested

variable        x index 1
variable        y index 1
variable        z index 1

variable        nrep equal v_x*v_y*v_z
if              "${nrep} > 1" then "replicate $x $y $z"

# initialize system

velocity        all create 0.0 87287 loop geom

pair_style      zero 1.0
pair_coeff      * *

neighbor        1.0 bin
neigh_modify    every 1 delay 0 check yes

fix             1 all nve

fix             2 all mdi/qm virial yes elements O H
fix_modify      2 energy yes

thermo_style    custom step temp pe etotal press

# minimization

thermo          10

min_style       fire

mdi             plugin latte_mdi mdi "-role ENGINE -name LATTE -method LINK" &
                extra latte.in.water command "minimize 1.0e-4 1.0e-4 500 500"
