# bcc iron in a 3d periodic box
print "Test 1"

units 		metal
dimension 	3
boundary 	p p f

atom_style 	spin

# necessary for the serial algorithm (sametag)
atom_modify 	map array

lattice 	bcc 2.8665
region 		box block 0.0 4.0 0.0 4.0 0.0 1.0
#create_box 	1 box
#create_atoms 	1 box

read_data        ../examples/SPIN/gneb_bfo/initial.iron_spin

# setting mass, mag. moments, and interactions for bcc iron

mass		1 55.845
#set 		group all spin 2.2 -1.0 0.0 0.0

pair_style 	spin/exchange 3.5
pair_coeff 	* * exchange 3.4 0.02726 0.2171 1.841

neighbor 	0.1 bin
neigh_modify 	every 10 check yes delay 20

fix 		1 all precession/spin zeeman 0.001 0.0 0.0 1.0 anisotropy 0.01 1.0 0.0 0.0
fix 		2 all langevin/spin 0.1 0.0 21
fix		3 all neb/spin 1.0
#fix		4 all nve/spin lattice no
#parallel ideal

timestep	0.0001
thermo		100


min_style	spinmin
neb/spin	0.0 0.1 100 10 10 final ../examples/SPIN/gneb_bfo/final.iron_spin
#neb/spin		0.0 0.1 1000 1000 100 final ../examples/SPIN/gneb_bfo/final.iron_spin
