units		   real
atom_style	full

pair_style lj/cut/tip4p/long 1 2 1 1 0.14714951 8
bond_style      class2
angle_style     harmonic
kspace_style    pppm/tip4p 0.0001

read_data	./data.tip4pf
pair_coeff  * 2 0 0
pair_coeff  1  1  0.1852  3.1589022

#q-tip4pf bond parameters
bond_coeff      1 0.9419 607.19354  -1388.6516 1852.577
angle_coeff     1 43.93  107.4
thermo          10
thermo_style    custom step temp pe ke etotal

timestep	0.5

#dump            1 all xtc 100 h2o.xtc
#dump_modify     1 unwrap yes
dump            1 all xyz 100 h2o.xyz

# smart sampling: best efficiency on slow diffusive modes,
# and as good as possible on higher-frequency modes
fix 1 all gle 6 300 300 31415 smart.A
fix_modify 1 energy no

velocity        all create 300.0 1112 dist gaussian
run		100000
