# Initialization
units           metal
boundary        p p p
atom_style      full
processors      * * 1     # domain decomposition over x and y

# System and atom definition
# we use 2 atom types so that inter- and intra-layer
# interactions can be specified separately
read_data       gr_hBN_Cstack_2L_noH.data
mass            1 10.8110   # boron    mass (g/mole) | membrane
mass            2 14.0067   # nitrogen mass (g/mole) | membrane
mass            3 12.0107   # carbon   mass (g/mole) | adsorbate
# Separate atom groups
group membrane  type 1 2
group adsorbate type 3

######################## Potential defition ########################
pair_style  hybrid/overlay rebo tersoff ILP/graphene/hBN 16.0 coul/shield 16.0
####################################################################
pair_coeff  * * rebo               CH.airebo     NULL NULL C    # chemical
pair_coeff  * * tersoff            BNC.tersoff   B    N    NULL # chemical
pair_coeff  * * ILP/graphene/hBN   BNCH-old.ILP  B    N    C    # long range
pair_coeff  1 1 coul/shield 0.70
pair_coeff  1 2 coul/shield 0.69498201415576216335
pair_coeff  2 2 coul/shield 0.69
####################################################################
# Neighbor update settings
neighbor        2.0 bin
neigh_modify    every 1
neigh_modify    delay 0
neigh_modify    check yes

# calculate the COM
variable        adsxcom equal xcm(adsorbate,x)
variable        adsycom equal xcm(adsorbate,y)
variable        adszcom equal xcm(adsorbate,z)
variable        adsvxcom equal vcm(adsorbate,x)
variable        adsvycom equal vcm(adsorbate,y)
variable        adsvzcom equal vcm(adsorbate,z)

#### Simulation settings ####
timestep  0.001
velocity  all create 300.0 12345
fix       thermostat all nve

compute   0 all pair rebo
compute   1 all pair tersoff
compute   2 all pair ILP/graphene/hBN
compute   3 all pair coul/shield
variable  REBO     equal  c_0
variable  Tersoff  equal  c_1
variable  EILP     equal  c_2
variable  Ecoul    equal  c_3

# Calculate the pair potential between the substrate and slider
compute         sldsub adsorbate group/group membrane
variable        Evdw equal c_sldsub

############################

# Output
thermo          100
thermo_style    custom step cpu etotal pe ke v_Evdw v_Tersoff v_REBO v_EILP v_Ecoul temp v_adsxcom v_adsycom v_adszcom v_adsvxcom v_adsvycom v_adsvzcom
thermo_modify   line one format float %.16f

dump            1 all custom 1000 traj.lammpstrj id mol type xu yu zu
dump_modify     1 format line "%7d %3d %3d %15.10g %15.10g %15.10g" flush yes

###### Run molecular dynamics ######
run 100000
