# ACKS2 Water, CITE: Achtyl et al., Nat. Comm., 6 6539 (2015)

boundary        p p p
units           real
atom_style      full

read_data       data.water

replicate       $x $y $z

pair_style      reaxff NULL safezone 3.0 mincap 150
pair_coeff      * * acks2_ff.water O H
neighbor        0.5 bin
neigh_modify    every 1 delay 0 check yes

velocity all create 300.0 4928459 rot yes dist gaussian

fix             1 all acks2/reaxff 1 0.0 10.0 1.0e-6 reaxff maxiter 400
fix             2 all nvt temp 300 300 50.0

timestep        0.5
thermo          100
thermo_style    custom step temp press density vol

run ${t}
