# orthogonal box for 2d sq2 lattice unit cell

dimension     2

lattice       sq2 1.1

region        mybox block 0 1 0 1 -0.5 0.5
create_box    1 mybox
create_atoms  1 box

mass          * 1.0

write_data    tmp.data.sq2.orthog

pair_style    lj/cut 1.1
pair_coeff    * * 1.0 1.0

neighbor      0.0 bin

thermo_style  custom step pe avecx avecy bvecx bvecy pxx pyy vol

dump          1 all custom 100 tmp.dump.sq2.orthog id type x y z

run           0
