# 2d polygon nparticle bodies

timer		off
units		lj
dimension       2
atom_style	body nparticle 2 6

print "test disabled because it stalls on 4xMPI /w 1xOpenMP for unknown reasons"
quit 0


read_data       data.body

velocity	all create 1.44 87287 loop geom

pair_style	body 5.0
pair_coeff	* * 1.0 1.0

neighbor	0.3 bin

fix		1 all nve/body
fix		2 all enforce2d

#compute         1 all body/local type 1 2 3
#dump            1 all local 100 dump.body index c_1[1] c_1[2] c_1[3] c_1[4]

thermo          500
info		all
run		10000
