variable  newton_pair     index  on
variable  newton_bond     index  on
variable  bond_factor     index  0.10
variable  angle_factor    index  0.25
variable  dihedral_factor index  0.50
variable  units           index  real
variable  input_dir       index  .
variable  data_file       index ${input_dir}/data.cmap
variable  pair_style      index 'zero 8.0'
variable  bond_style      index zero
variable  angle_style     index zero
variable  dihedral_style  index zero
variable  improper_style  index zero
variable  t_target        index 100.0
# id of the "fix cmap" instance.  the fix must exist before the data file is
# read, because the CMAP crossterm section is parsed by the fix itself.  the
# fix-timestep test for fix cmap overrides this with "test" so the driver
# finds the fix under test.
variable  cmap_fix_id     index  cmap

atom_style       full
atom_modify      map array
neigh_modify     delay 2 every 2 check no
units            ${units}
timestep         0.1
newton           ${newton_pair} ${newton_bond}
special_bonds    lj/coul ${bond_factor} ${angle_factor} ${dihedral_factor}

pair_style       ${pair_style}
bond_style       ${bond_style}
angle_style      ${angle_style}
dihedral_style   ${dihedral_style}
improper_style   ${improper_style}

fix             ${cmap_fix_id} all cmap charmm36.cmap
fix_modify      ${cmap_fix_id} energy yes

read_data        ${data_file} fix ${cmap_fix_id} crossterm CMAP
