variable  newton_pair     index  on
variable  newton_bond     index  on
variable  units           index  metal
variable  input_dir       index  .
variable  data_file       index ${input_dir}/data.dpd-react
variable  pair_style      index 'zero 8.0'

units            ${units}
atom_style       dpd
atom_modify      map array
boundary         p p p
newton           ${newton_pair} ${newton_bond}
comm_modify      mode single vel yes
# the Shardlow splitting requires a box larger than 2*(cutoff+skin)
neighbor         1.0 bin
neigh_modify     delay 2 every 2 check no
timestep         0.001

pair_style       ${pair_style}
read_data        ${data_file}
