variable  newton_pair     index  on
variable  newton_bond     index  on
variable  units           index  metal
variable  input_dir       index  .
variable  data_file       index ${input_dir}/data.dpd-react-dense
variable  pair_style      index 'zero 4.4'
variable  rx_fix_id       index  rxfix

units            ${units}
atom_style       dpd
atom_modify      map array
boundary         p p p
newton           ${newton_pair} ${newton_bond}
comm_modify      mode single vel yes
neighbor         1.0 bin
neigh_modify     delay 2 every 2 check no
timestep         0.001

# same setup as in.dpd-rx, but on a much denser configuration with a short
# cutoff.  pair style multi/lucy/rx needs the Lucy weighted local density to
# fall inside the tabulated density range, which requires neighbors well
# inside the cutoff sphere, not just a single shell close to the cutoff.

fix              ${rx_fix_id} all rx ${input_dir}/dpd_rx_kinetics.txt none dense lammps_rk4 1

pair_style       ${pair_style}
read_data        ${data_file} fix ${rx_fix_id}_SPECIES NULL NULL fix ${rx_fix_id}_SPECIES_OLD NULL NULL
